// SBML level 2 version 4
// dcterms:bibliographicCitation: urn:miriam:pubmed:23365616

model Mufudza2012___Estrogen_effect_on_the_dynamics_of_breast_cancer()
  // Mufudza2012 - Estrogen effect on the dynamics of breast cancer
  // This deterministic model shows the dynamics of breast cancer with immune response. The effects of estrogen are incorporated to study its effects as a risk factor for the disease.
  // This model is described in the article:
  // Assessing the effects of estrogen on the dynamics of breast cancer.
  // Mufudza C, Sorofa W, Chiyaka ET.
  // Comput Math Methods Med 2012; 2012: 473572
  // Abstract:
  // Worldwide, breast cancer has become the second most common cancer in women. The disease has currently been named the most deadly cancer in women but little is known on what causes the disease. We present the effects of estrogen as a risk factor on the dynamics of breast cancer. We develop a deterministic mathematical model showing general dynamics of breast cancer with immune response. This is a four-population model that includes tumor cells, host cells, immune cells, and estrogen. The effects of estrogen are then incorporated in the model. The results show that the presence of extra estrogen increases the risk of developing breast cancer.
  // This model is hosted on BioModels Database and identified by: BIOMD0000000642.
  // To cite BioModels Database, please use: BioModels Database: An enhanced, curated and annotated resource for published quantitative kinetic models.
  // To the extent possible under law, all copyright and related or neighbouring rights to this encoded model have been dedicated to the public domain worldwide. Please refer to CC0 Public Domain Dedication for more information.
  // biomodels.db:MODEL1304190001
  // biomodels.db:BIOMD0000000642
  // isDescribedBy pubmed:23365616
  // hasProperty GO:0043627 DOID:+0060075 mamo:MAMO_0000046
  // hasTaxon taxonomy:9606

  // Compartments:
  compartment Tissue = 1; Tissue is "breast";  // isVersionOf OMIT:0027497; isVersionOf BTO:0000149

  // Species:
  species $H in Tissue = 1; H is "normal cells";  // isVersionOf GO:0005623
  species $T in Tissue = 1e-5; T is "Tumour cells";  // isVersionOf CL:0001063
  // These are immune cells involved in immune response.
  species $I in Tissue = 1.37931; I is "Immune cells";  // hasProperty GO:0006955; isVersionOf GO:0005623
  // 17-beta-estradiol
  species $E in Tissue = 0.5; E is "estrogen";  // CHEBI:16469

  // Parameters:
  alpha1 = 0.7;  // isDescribedBy pubmed:23365616
  alpha2 = 0.98;
  beta1 = 0.3;  // isDescribedBy pubmed:23365616
  beta2 = 0.4;  // isDescribedBy pubmed:12955460
  delta1 = 1;  // isDescribedBy pubmed:12955460
  gamma2 = 0.9;  // isDescribedBy pubmed:12955460
  s = 0.4;  // isDescribedBy doi:10.1080/10273660108833067
  rho = 0.2;  // isDescribedBy doi:10.1080/10273660108833067
  omega = 0.3;  // isDescribedBy pubmed:10.1080%2F10273660108833067
  mu = 0.29;  // isDescribedBy pubmed:12955460
  alpha3 = 1;
  gamma3 = 0.085;
  sigma1 = 1.2;
  sigma2 = 0.94;
  sigma3 = 0.3;
  v = 0.4;
  theta = 0.8;
  pi = 0;

  // Rate rules:
  H' = H*(alpha1 - beta1*H - delta1*T) - sigma1*H*E;
  T' = T*(alpha3 - beta2*T) - gamma2*I*T + sigma2*H*E;
  I' = s + rho*I*T/(omega + T) - gamma3*I*T - mu*I - sigma3*I*E/(v + E);

  // Unit definitions:
  unit time = 86400 second;
end
