// SBML level 2 version 4
// dcterms:bibliographicCitation: A mathematical model for the effect of toxicant on the immune system urn:miriam:doi:10.1142/S0218339007002301

function Function_for_betterment_of_the_relative_characteristics_of_the_damaged_part_of_the_organ(alpha, P)
  alpha*P;
end

function Function_for_increase_in_the_amount_of_pathogenic_micro_organism(beta, P)
  beta*P;
end
Function_for_increase_in_the_amount_of_pathogenic_micro_organism is "Function for increase in the amount of pathogenic micro-organism";

function Function_for_decrease_in_the_amount_of_pathogenic_micro_organism(gamma, I, P, beta0)
  gamma*I*P + beta0*P*P;
end
Function_for_decrease_in_the_amount_of_pathogenic_micro_organism is "Function for decrease in the amount of pathogenic micro-organism";

function Function_for_increase_in_the_immune_response(mu, b, I, P)
  mu + b*I*P;
end

function Function_for_decrease_in_the_relative_characteeristics_of_damaged_part_of_the_organ(alpha0, M)
  alpha0*M;
end

function Function_for_reduction_of_immune_response(a, I, n, gamma, P)
  a*I + n*gamma*I*P;
end

model Dubey2007___A_mathematical_model_for_the_effect_of_toxicant_on_the_immune_system__without_toxicant_effect__Model1()
  // Dubey2007 - A mathematical model for the effect of toxicant on the immune system (without toxicant effect) Model1
  // In this paper, a nonlinear mathematical model is proposed and analyzed to study the
  // effect of environmental toxicant on the immune response of the body. Criteria for local
  // stability, instability and global stability are obtained. It is shown that the immune
  // response of the body decreases as the concentration of environmental toxicant increases,
  // and certain criteria are obtained under which it settles down at its equilibrium level.
  // In the absence of toxicant, an oscillatory behavior of immune system and pathogenic
  // growth is observed. However, in the presence of toxicant, oscillatory behavior is not
  // observed. These studies show that the toxicant may have a grave effect on our body’s
  // defense mechanism.
  // Keywords: Pathogen; Immune Response; Toxicant; Stability.
  // hasInstance mamo:MAMO_0000046 taxonomy:9606 BTO:0005810
  // isDescribedBy BTO:0005810 doi:10.1142/S0218339007002301
  // hasProperty mamo:MAMO_0000046
  // hasTaxon taxonomy:9606
  // biomodels.db:MODEL1912190002 biomodels.db:BIOMD0000000906

  // Compartments:
  compartment compartment = 1;

  // Species:
  species P in compartment = 1;  // hasInstance ncit:C14329
  species I in compartment = 1;  // hasInstance BTO:0005810
  species M in compartment = 1;

  // Parameters:
  beta = 0.9;
  gamma = 0.05;
  beta0 = 0.2;
  mu = 0.04;
  a = 0.8;
  b = 0.3;
  n = 0.1;
  alpha = 2.4;
  alpha0 = 0.1;

  // Reactions:
  increase_in_the_amount_of_pathogenic_micro_organism: => P; compartment*Function_for_increase_in_the_amount_of_pathogenic_micro_organism(beta, P); increase_in_the_amount_of_pathogenic_micro_organism is "increase in the amount of pathogenic micro-organism";  // hasInstance ncit:C25533
  Decrease_in_the_amount_of_pathogenic_micro_organism: P => ; compartment*Function_for_decrease_in_the_amount_of_pathogenic_micro_organism(gamma, I, P, beta0); Decrease_in_the_amount_of_pathogenic_micro_organism is "Decrease in the amount of pathogenic micro-organism";  // modifiers: I
  Increase_of_appropriate_immune_response_with_respect_to_pathogen: => I; compartment*Function_for_increase_in_the_immune_response(mu, b, I, P);  // modifiers: P; hasInstance ncit:C25533
  Reduction_of_immune_response: I => ; compartment*Function_for_reduction_of_immune_response(a, I, n, gamma, P);  // modifiers: P; hasInstance ncit:C157203
  betterment_of_relative_characteristics_of_the_damaged_part_of_the_organ: => M; compartment*Function_for_betterment_of_the_relative_characteristics_of_the_damaged_part_of_the_organ(alpha, P);  // modifiers: P; hasInstance ncit:C25533
  removal_of_relative_characteristics_of_the_damaged_part_of_the_organ: M => ; compartment*Function_for_decrease_in_the_relative_characteeristics_of_damaged_part_of_the_organ(alpha0, M);  // hasInstance ncit:C157203

  // Unit definitions:
  unit volume = 1e-3 litre;
  unit substance = 1e-3 mole;
end
