// SBML level 2 version 4
// dcterms:bibliographicCitation: DOI urn:miriam:doi:10.3390/math8081285

function function_for_reaction_1(r, N)
  r*N;
end

function function_for_reaction_2(r, N, B1)
  r*N^2*B1;
end

function function_for_reaction_3(r, N, I)
  r*N*I;
end

function function_for_reaction_4(gamma, N, T)
  gamma*N*T;
end

function function_for_reaction_5(alpha1, T)
  alpha1*T;
end

function function_for_reaction_9(sigma)
  sigma;
end

function function_for_reaction_10(delta, I)
  delta*I;
end

function function_for_reaction_11(rho, N, I, m)
  rho*N*I/(N + m);
end

function function_for_reaction_12(rho1, T, I, m1)
  rho1*T*I/(m1 + T);
end

function function_for_reaction_13(mu, N, I)
  mu*N*I;
end

function function_for_reaction_14(mu1, T, I)
  mu1*T*I;
end

function function_for_reaction_6(alpha1, alpha2, T)
  alpha1*alpha2*T^2;
end

function function_for_reaction_7(beta2, N, T)
  beta2*N*T;
end

function function_for_reaction_8(alpha3, T, I)
  alpha3*T*I;
end

model Alharbi2020___Tumor_and_immune_system_competition()
  // Alharbi2020 - Tumor and immune system competition
  // isDescribedBy doi:10.3390/math8081285
  // occursIn ncit:C98275
  // hasTaxon taxonomy:9606
  // isDescribedBy doi:10.3390/math8081285
  // hasProperty GO:0002837 ncit:C20187 GO:0002418 mamo:MAMO_0000046
  // biomodels.db:MODEL2204140001

  // Compartments:
  compartment Tissue = 1;  // isVersionOf ncit:C12801

  // Species:
  species I in Tissue = 1;  // isVersionOf GO:0002418
  species N in Tissue = 1;  // isVersionOf GO:0001833
  species T in Tissue = 1.22;  // isVersionOf ncit:C98275

  // Parameters:
  r = 0.4312;
  beta1 = 2.99e-6;
  n = 0.1379;
  gamma = 0.9314;
  alpha1 = 0.4426;
  alpha2 = 0.4;
  beta2 = 1.189;
  alpha3 = 0.1469;
  sigma = 0.7;
  delta = 0.57;
  rho = 0.271;
  m = 0.813;
  m1 = 0.862;
  rho1 = 0.7829;
  mu = 0.813;
  mu1 = 0.3634;

  // Reactions:
  Normal_cell_proliferation: => N; Tissue*function_for_reaction_1(r, N);
  division_of_normal_cells_into_abnormal_cells: N => ; Tissue*function_for_reaction_2(r, N, beta1);  // isVersionOf ncit:C17212
  Normal_cells_eradication_by_immune_cells: N => ; Tissue*function_for_reaction_3(r, N, I);  // modifiers: I; isVersionOf GO:0008219; isVersionOf ncit:C175900
  Normal_cells_eradication_or_inhibition_by_tumor_cells: N => ; Tissue*function_for_reaction_4(gamma, N, T);  // modifiers: T; isVersionOf ncit:C175900; isVersionOf GO:0008219
  Tumor_cells_proliferation: => T; Tissue*function_for_reaction_5(alpha1, T);  // isVersionOf ncit:C28378
  decline_of_tumor_cells: T => ; Tissue*function_for_reaction_6(alpha1, alpha2, T);  // isVersionOf GO:0008219
  conversion_of_abnormal_cells_into_tumor_cells: => T; Tissue*function_for_reaction_7(beta2, N, T);  // modifiers: N; isVersionOf ncit:C17212
  tumor_cell_eradication_or_inhibition_by_immune_cells: T => ; Tissue*function_for_reaction_8(alpha3, T, I);  // modifiers: I; isVersionOf GO:0008219; isVersionOf ncit:C175900; isVersionOf ncit:C42791
  constant_source_of_immune_system_response: => I; Tissue*function_for_reaction_9(sigma);  // isVersionOf GO:0002357
  immune_cells_death: I => ; Tissue*function_for_reaction_10(delta, I);  // isVersionOf ncit:C175900; isVersionOf GO:0008219
  elimination_of_tumor_cells_due_to_the_detection_of_their_appearance: => I; Tissue*function_for_reaction_11(rho, N, I, m);  // modifiers: N; isVersionOf GO:0008219; isVersionOf GO:0002418; isVersionOf ncit:C175900
  elimination_of_tumor_cells_due_to_the_detection_of_their_activity: => I; Tissue*function_for_reaction_12(rho1, T, I, m1);  // modifiers: T; isVersionOf GO:0002418; isVersionOf ncit:C175900; isVersionOf GO:0008219
  death_of_immune_cells_after_interaction_with_tumor: I => ; Tissue*function_for_reaction_13(mu, N, I);  // modifiers: N; isVersionOf GO:0008219
  suppression_of_immune_activity_by_tumor_cells: I => ; Tissue*function_for_reaction_14(mu1, T, I);  // modifiers: T; isVersionOf GO:0008219; isVersionOf ncit:C175900

  // Unit definitions:
  unit length = metre;
  unit area = metre^2;
  unit volume = litre;
  unit time = 86400 second;
  unit substance = mole;
end
