// SBML level 3 version 1
// dcterms:bibliographicCitation: urn:miriam:pubmed:29250133

function tg(r, T, K)
  r*T*(1 - T/K);
end

function cyt(a, T, I, b)
  a*T*I/(b + T);
end

function tk(d, T, C, m)
  d*T*C/(m + T);
end

function icg(beta, T, I, k)
  beta*T*I/(k + T);
end

function Constant_flux__irreversible(v)
  v;
end
Constant_flux__irreversible is "Constant flux (irreversible)";

model Wei2017___tumor__T_cell_and_cytokine_interaction()
  // Wei2017 - tumor, T cell and cytokine interaction
  // The paper describes a model of tumor-immune interaction. Created by COPASI 4.25 (Build 207) This model is described in the article: Periodically Pulsed Immunotherapy in a Mathematical Model of Tumor, CD4+ T Cells, and Antitumor Cytokine Interactions Hsiu-Chuan Wei, Jui-Ling Yu, Chia-Yu Hsu Computational and Mathematical Methods in Medicine Volume 2017, Article ID 2906282, 12 pages Abstract: Immunotherapy is one of the most recent approaches for controlling and curing malignant tumors. In this paper, we consider a mathematical model of periodically pulsed immunotherapy using CD4+ T cells and an antitumor cytokine. Mathematical analyses are performed to determine the threshold of a successful treatment. The interindividual variability is explored by one-, two-, and three-parameter bifurcation diagrams for a nontreatment case. Numerical simulation conducted in this paper shows that (i) the tumor can be regulated by administering CD4+ T cells alone in a patient with a strong immune system or who has been diagnosed at an early stage, (ii) immunotherapy with a large amount of an antitumor cytokine can boost the immune system to remit or even to suppress tumor cells completely, and (iii) through polytherapy the tumor can be kept at a smaller size with reduced dosages. To cite BioModels Database, please use: BioModels Database: An enhanced, curated and annotated resource for published quantitative kinetic models . To the extent possible under law, all copyright and related or neighbouring rights to this encoded model have been dedicated to the public domain worldwide. Please refer to CC0 Public Domain Dedication for more information.
  // isDescribedBy pubmed:29250133
  // hasProperty GO:0002418
  // hasProperty mamo:MAMO_0000046
  // hasTaxon taxonomy:9606
  // biomodels.db:MODEL1908050001 biomodels.db:BIOMD0000000778
  // model units - substance: substance, time: time, volume: volume, area: area, length: length, extent: substance

  // Compartments:
  compartment tme = 1 volume;  // isVersionOf ncit:C94498

  // Species:
  // tumor, normalised
  species T in tme = 0.5;  // isVersionOf CL:0001064
  // CD4 T cells, normalised
  species I in tme = 0.01;  // isVersionOf CL:0000492
  // antitumor cytokine, normalised
  species C in tme = 0;  // isVersionOf ncit:C20464

  // Parameters:
  // Intrinsic growth rate of the tumor
  r = 0.01 unit_0;
  // Carrying capacity of the tumor
  K = 1000 unit_1;
  // Maximum tumor killing rate by antitumor cytokine
  d = 0.1 unit_0;  // isVersionOf ncit:C25636
  // Half saturation constant of the tumor killing rate
  m = 50 unit_1;
  // Maximum CD4+ T cell production rate (antigenicity of the tumor)
  beta = 0.1 unit_0;
  // Half saturation constant of CD4+ T cell production rate
  k = 1000 unit_1;
  // Death rate of the CD4+ T cells
  a = 0.03 unit_0;  // isVersionOf ncit:C25636
  // Treatment of CD4+ T cells
  l1 = 0 unit_0;  // isVersionOf ncit:C25636
  // Maximum production rate of the antitumor cytokine
  alpha = 0.01 unit_0;  // isVersionOf ncit:C25636
  // Half saturation constant of antitumor cytokine production rate
  b = 100 unit_1;
  // Antitumor cytokine loss rate
  u = 50 unit_0;  // isVersionOf ncit:C25636
  // Treatment of cytokine (IL-4)
  l2 = 0 unit_0;  // isVersionOf ncit:C25636
  // T cells for plotting
  I_plot has unit_1;  // isVersionOf CL:0000492
  // tumor cells for plotting
  T_plot has unit_1;  // isVersionOf CL:0001064

  // Assignment rules:
  I_plot := I/100000;
  T_plot := T/100;

  // Reactions:
  tumor_growth: => T; tme*tg(r, T, K);  // isVersionOf GO:0000828
  tumor_killing: T => ; tme*tk(d, T, C, m);  // modifiers: C; isVersionOf GO:0002418; isVersionOf GO:0008219
  immune_cell_growth: => I; tme*icg(beta, T, I, k);  // modifiers: T; isVersionOf GO:0042098
  immune_cell_death: I => ; tme*a*I;  // isVersionOf GO:0008219
  immunotherapy: => I; tme*Constant_flux__irreversible(l1);  // isVersionOf ncit:C15262
  cytokine_production: => C; tme*cyt(alpha, T, I, b);  // modifiers: T, I; isVersionOf GO:0001816
  cytokine_decay: C => ; tme*u*C;  // isVersionOf GO:0030163
  chemotherapy: => C; tme*Constant_flux__irreversible(l2);  // isVersionOf ncit:C15632

  // Unit definitions:
  unit length = metre;
  unit area = metre^2;
  unit volume = 1e-3 litre;
  unit time = 86400 second;
  unit substance = 1e-3 mole;
  unit unit_0 = 1 / (8640 second); unit_0 is "1/d";
  unit unit_1 = dimensionless^0;
end
