// SBML level 3 version 1
// dcterms:bibliographicCitation: urn:miriam:pubmed:30853393

function growth(p, pro, k, z)
  p*pro*(k - z);
end

function immune(a, L, y)
  a*L/(y + L);
end

model Sharp2019___AML()
  // Sharp2019 - AML
  // The paper describes a model of acute myeloid leukaemia. Created by COPASI 4.26 (Build 213) This model is described in the article: Optimal control of acute myeloid leukaemia Jesse A. Sharp, Alexander P Browning, Tarunendu Mapder, Kevin Burrage, Matthew J Simpson Journal of Theoretical Biology 470 (2019) 30–42 Abstract: Acute myeloid leukaemia (AML) is a blood cancer affecting haematopoietic stem cells. AML is routinely treated with chemotherapy, and so it is of great interest to develop optimal chemotherapy treatment strategies. In this work, we incorporate an immune response into a stem cell model of AML, since we find that previous models lacking an immune response are inappropriate for deriving optimal control strategies. Using optimal control theory, we produce continuous controls and bang-bang controls, corre- sponding to a range of objectives and parameter choices. Through example calculations, we provide a practical approach to applying optimal control using Pontryagin’s Maximum Principle. In particular, we describe and explore factors that have a profound influence on numerical convergence. We find that the convergence behaviour is sensitive to the method of control updating, the nature of the control, and to the relative weighting of terms in the objective function. All codes we use to implement optimal control are made available. To cite BioModels Database, please use: BioModels Database: An enhanced, curated and annotated resource for published quantitative kinetic models . To the extent possible under law, all copyright and related or neighbouring rights to this encoded model have been dedicated to the public domain worldwide. Please refer to CC0 Public Domain Dedication for more information.
  // isDescribedBy pubmed:30853393
  // hasProperty mamo:MAMO_0000046
  // hasProperty efo:0000222
  // hasTaxon taxonomy:9606
  // biomodels.db:MODEL1908190001 biomodels.db:BIOMD0000000798
  // model units - substance: substance, time: time, volume: volume, area: area, length: length, extent: substance

  // Compartments:
  compartment bone_marrow = 1 volume;  // isVersionOf BTO:0000141

  // Species:
  // haematopoietic stem cells
  // 0.1/0.5/0.1/0
  species S in bone_marrow = 0.1;  // isVersionOf CL:0000037
  // progenitor cells
  species A in bone_marrow = 0;  // isVersionOf CL:0000049
  // terminally differentiated cells
  species D in bone_marrow = 0;  // isVersionOf CL:0000000
  // leukaemia stem cells
  // 0.1/0.001/0/0.1
  species L in bone_marrow = 0.1;  // isVersionOf CL:0000034
  // fully differentiated leukaemia cells
  species T in bone_marrow = 0;  // isVersionOf efo:0002937

  // Parameters:
  Z1 has unit_0;
  Z2 has unit_0;
  // Proliferation of S
  ps = 0.5 unit_0;
  // Proliferation of A
  pa = 0.43 unit_0;
  // Proliferation of L
  pl = 0.27 unit_0;
  // Differentiation of S into A
  ds = 0.14 unit_0;  // isVersionOf ncit:C25636
  // Differentiation of A into D
  da = 0.44 unit_0;  // isVersionOf ncit:C25636
  // Differentiation of L into T
  dl = 0.05 unit_0;  // isVersionOf ncit:C25636
  // Migration of D into the blood stream
  ud = 0.275 unit_0;  // isVersionOf ncit:C25636
  // Migration of T into the blood stream
  ut = 0.3 unit_0;  // isVersionOf ncit:C25636
  // Carrying capacity of the compartment with S
  k1 = 1 unit_0;
  // Carrying capacity of the compartment with A and L
  k2 = 1 unit_0;
  // Characteristic rate of the immune response
  // for control set a=0.015; for original model set a=0
  a = 0.015 unit_0;  // isVersionOf ncit:C25636
  // Half saturation constant of the immune response
  y = 0.01 unit_0;

  // Assignment rules:
  Z2 := A + L;
  Z1 := S;

  // Reactions:
  HSC_growth: => S; bone_marrow*growth(ps, S, k1, Z1);  // isVersionOf GO:0071425
  HSC_differentiation: S => A; bone_marrow*ds*S;  // isVersionOf GO:0030154
  progenitor_growth: => A; bone_marrow*growth(pa, A, k2, Z2);  // isVersionOf GO:0008283
  progenitor_differentiation: A => D; bone_marrow*da*A;  // isVersionOf GO:0030154
  normal_cell_efflux: D => ; bone_marrow*ud*D;
  LSC_growth: => L; bone_marrow*growth(pl, L, k2, Z2);  // isVersionOf GO:0008283
  LSC_differentiation: L => T; bone_marrow*dl*L;  // isVersionOf GO:0030154
  leukaemia_cell_efflux: T => ; bone_marrow*ut*T;
  immune_control: L => ; bone_marrow*immune(a, L, y);  // isVersionOf GO:0002418

  // Unit definitions:
  unit length = metre;
  unit area = metre^2;
  unit volume = 1e-3 litre;
  unit time = second;
  unit substance = 1e-3 mole;
  unit unit_0 = dimensionless^0; unit_0 is "1";
end
