// SBML level 3 version 1
// dcterms:bibliographicCitation: urn:miriam:pubmed:28970093

function ad(a2, y, R, S)
  a2*y*R*S;
end

function aa(a1, R, A, S)
  a1*(1 - R)*A*S;
end

function rf(a1, y, R, A)
  a1/y*(1 - R)*A;
end

function ck(f, C)
  f*C;
end

function cf(v1, u, C, S)
  v1*(u - C)*(S - C);
end

model Hoffman2018__ADCC_against_cancer()
  // Hoffman2018- ADCC against cancer
  // The paper describes a model of ADCC. Created by COPASI 4.26 (Build 213) This model is described in the article: A mathematical model of antibody-dependent cellular cytotoxicity (ADCC) F. Hoffman, D. Gavaghan, J. Osborne, I.P. Barrett, T. You, H. Ghadially, R. Sainson, R.W. Wilkinson, H.M. Byrne Journal of Theoretical Biology 436 (2018) 39–50 Abstract: Immunotherapies exploit the immune system to target and kill cancer cells, while sparing healthy tis- sue. Antibody therapies, an important class of immunotherapies, involve the binding to specific antigens on the surface of the tumour cells of antibodies that activate natural killer (NK) cells to kill the tu- mour cells. Preclinical assessment of molecules that may cause antibody-dependent cellular cytotoxicity (ADCC) involves co-culturing cancer cells, NK cells and antibody in vitro for several hours and measuring subsequent levels of tumour cell lysis. Here we develop a mathematical model of such an in vitro ADCC assay, formulated as a system of time-dependent ordinary differential equations and in which NK cells kill cancer cells at a rate which depends on the amount of antibody bound to each cancer cell. Numerical simulations generated using experimentally-based parameter estimates reveal that the system evolves on two timescales: a fast timescale on which antibodies bind to receptors on the surface of the tumour cells, and NK cells form complexes with the cancer cells, and a longer time-scale on which the NK cells kill the cancer cells. We construct approximate model solutions on each timescale, and show that they are in good agreement with numerical simulations of the full system. Our results show how the processes involved in ADCC change as the initial concentration of antibody and NK-cancer cell ratio are varied. We use these results to explain what information about the tumour cell kill rate can be extracted from the cytotoxicity assays. To cite BioModels Database, please use: BioModels Database: An enhanced, curated and annotated resource for published quantitative kinetic models . To the extent possible under law, all copyright and related or neighbouring rights to this encoded model have been dedicated to the public domain worldwide. Please refer to CC0 Public Domain Dedication for more information.
  // isDescribedBy pubmed:28970093
  // hasProperty GO:0001788
  // hasProperty mamo:MAMO_0000046
  // hasTaxon taxonomy:9606
  // biomodels.db:MODEL1908200002 biomodels.db:BIOMD0000000802
  // model units - substance: substance, time: time, volume: volume, area: area, length: length, extent: substance

  // Compartments:
  compartment tme = 1 volume;  // isVersionOf ncit:C94498

  // Species:
  // antibody
  species A in tme = 1;  // isVersionOf ncit:C16295
  // antibody-receptor complex per cancer cell
  species R in tme = 0;  // isVersionOf ncit:C19398
  // total cancer cell
  species S in tme = 1;  // isVersionOf CL:0001064
  // NK-cancer cell complex
  species C in tme = 0;  // isVersionOf ncit:C19398

  // Parameters:
  // Dimensionless antibody binding rate
  // 5.8e-6 to 580
  a1 = 0.001 unit_0;  // isVersionOf ncit:C25636
  // Dimensionless antibody dissociation rate
  a2 = 1.44 unit_0;  // isVersionOf ncit:C25636
  // Initial ratio of total number of receptors to antibody
  // 6.22e-9 to 622
  y has unit_0;  // isVersionOf ncit:C44256
  // Dimensionless cell kill rate
  // 0-22.4
  f has unit_0;  // isVersionOf ncit:C25636
  // Dimensionless cell binding rate
  v1 = 120 unit_0;  // isVersionOf ncit:C25636
  // Initial ratio of NK cells to tumour cells
  // 1-20
  u = 20 unit_0;  // isVersionOf ncit:C44256
  // Dimensionless cell dissociation rate
  v2 = 14.4 unit_0;  // isVersionOf ncit:C25636
  // maximum rate of killing
  fk = 1 unit_0;  // isVersionOf ncit:C25636
  // half saturation constant of R at killing
  rk = 0.5 unit_0;
  // an Initial ratio of total number of receptors to antibody
  e has unit_0;  // isVersionOf ncit:C44256
  // exponent in antibody level
  n = 0 unit_0;  // isVersionOf ncit:C48923

  // Assignment rules:
  f := fk*R/(R + rk);
  e := a1;
  y := e^n;

  // Reactions:
  antibody_association: A => ; tme*aa(a1, R, A, S);  // modifiers: R, S
  antibody_dissociation: => A; tme*ad(a2, y, R, S);  // modifiers: R, S
  complex_formation: => R; tme*rf(a1, y, R, A);  // modifiers: A
  complex_dissociation: R => ; tme*a2*R;
  cancer_cell_killing_C: C => ; tme*f*C; cancer_cell_killing_C is "cancer cell killing-C";  // isVersionOf GO:0008219
  NK_complex_formation: => C; tme*cf(v1, u, C, S);  // modifiers: S
  NK_complex_degradation: C => ; tme*v2*C;
  cancer_cell_killing_S: S => ; tme*ck(f, C); cancer_cell_killing_S is "cancer cell killing-S";  // modifiers: C; isVersionOf GO:0008219

  // Unit definitions:
  unit length = metre;
  unit area = metre^2;
  unit volume = 1e-3 litre;
  unit time = second;
  unit substance = 1e-3 mole;
  unit unit_0 = dimensionless^0; unit_0 is "1";
end
