// SBML level 2 version 4
// dcterms:bibliographicCitation: MODELING THE INTERACTION BETWEEN AVASCULAR CANCEROUS CELLS AND ACQUIRED IMMUNE RESPONSE urn:miriam:doi:10.1142/S0218339008002605

function Function_for_Formation_of_tumor_cell(alpha, T)
  alpha*T;
end

function Function_for_removal_of_T_helper_cell_from_the_system(mu_10, Th)
  mu_10*Th;
end

function Function_for_removal_of_tumor_cell_from_the_system(alpha_0, T, alpha_1, Tc, delta_2, A)
  alpha_0*T*T + alpha_1*T*Tc + delta_2*T*A;
end

function Function_for_formation_of_B_cell(mu_3, T, gamma_1, B, gamma_2, Th)
  mu_3*T + gamma_1*T*B + gamma_2*Th*B;
end

function Function_for_formation_of_T_helper_cell(mu_1, T, mu_11, Th)
  mu_1*T + mu_11*T*Th;
end

function Function_for_removal_of_cytotoxic_T_cell(mu_20, Tc)
  mu_20*Tc;
end

function Function_for_formation_of_cytotoxic_T_cell_in_the_system(mu_2, T, bela_1, Tc, beta_2, Th)
  mu_2*T + bela_1*T*Tc + beta_2*Th*Tc;
end

function Function_for_removal_of_B_cell_from_the_system(mu_30, B)
  mu_30*B;
end

function Function_for_introduction_of_antibody_against_cancer(mu_4, B)
  mu_4*B;
end

function Function_for_removal_of_antibody_from_the_system(mu_40, A, delta_1, T)
  mu_40*A + delta_1*T*A;
end

model New_Model()
  // Dubey2008 - Modeling the interaction between avascular cancerous cells and acquired immune response
  // MODELING THE INTERACTION BETWEEN AVASCULAR CANCEROUS CELLS AND ACQUIRED IMMUNE RESPONSE
  // B. DUBEY, UMA S. DUBEY and SANDIP BANERJEE
  // Abstract
  // This paper deals with the interaction between dispersed cancer cells and the major populations of the immune system, namely, the T helper cells, T Cytotoxic cells, B cells, and antibodies produced. The system is described by a set of five ordinary differential equations. Both local and global stability of the system has been investigated. It has been observed that under appropriate conditions this interaction is capable of controlling the growth of these cancer cells. The analytical findings are supported by numerical and computational analytical methods.
  // biomodels.db:MODEL1912100002 biomodels.db:BIOMD0000000886
  // hasProperty mamo:MAMO_0000046
  // hasProperty GO:0006955
  // hasTaxon taxonomy:9606
  // isDescribedBy doi:10.1142/S0218339008002605
  // isDescribedBy doi:10.1142/S0218339008002605

  // Compartments:
  compartment compartment = 1;

  // Species:
  species T in compartment = 9;  // hasInstance ncit:C12476
  species Th in compartment = 7;  // hasInstance BTO:0002417
  species Tc in compartment = 1;
  species B in compartment = 1;  // hasInstance ncit:C12474
  species A in compartment = 1;  // hasInstance ncit:C16295

  // Parameters:
  alpha = 0.18;
  alpha_0 = 4.6;
  alpha_1 = 0.101;
  delta_2 = 0.008;
  mu_1 = 1.5;
  mu_10 = 0.2;
  mu_11 = 0.3;
  mu_2 = 1.4;
  mu_20 = 0.0412;
  beta_1 = 0.3;
  beta_2 = 0.05;
  mu_3 = 0.45;
  mu_30 = 0.03;
  gamma_1 = 0.4;
  gamma_2 = 0.3;
  mu_4 = 0.35;
  mu_40 = 0.3;
  delta_1 = 0.5;

  // Reactions:
  Formation_of_tumor_cell: => T; compartment*Function_for_Formation_of_tumor_cell(alpha, T);  // hasInstance ncit:C25513
  Removal_of_tumor_cell_from_the_system: T => ; compartment*Function_for_removal_of_tumor_cell_from_the_system(alpha_0, T, alpha_1, Tc, delta_2, A);  // modifiers: Tc, A; hasInstance ncit:C64914
  Formation_of_T_helper_cell: => Th; compartment*Function_for_formation_of_T_helper_cell(mu_1, T, mu_11, Th);  // modifiers: T; hasInstance ncit:C25513
  Removal_of_T_helper_cell_from_the_system: Th => ; compartment*Function_for_removal_of_T_helper_cell_from_the_system(mu_10, Th);  // hasInstance ncit:C64914
  formation_of_cytotoxic_T_cell: => Tc; compartment*Function_for_formation_of_cytotoxic_T_cell_in_the_system(mu_2, T, beta_1, Tc, beta_2, Th);  // modifiers: T, Th; hasInstance ncit:C25513
  Removal_of_cytotoxic_T_cell: Tc => ; compartment*Function_for_removal_of_cytotoxic_T_cell(mu_20, Tc);  // hasInstance ncit:C64914
  Formation_of_B_cell: => B; compartment*Function_for_formation_of_B_cell(mu_3, T, gamma_1, B, gamma_2, Th);  // modifiers: T, Th; hasInstance ncit:C25513
  Removal_of_B_cell_from_the_system: B => ; compartment*Function_for_removal_of_B_cell_from_the_system(mu_30, B);  // hasInstance ncit:C64914
  introduction_of_antibody_against_cancer: => A; compartment*Function_for_introduction_of_antibody_against_cancer(mu_4, B);  // modifiers: B; hasInstance ncit:C25513
  Removal_of_antibody_from_the_system: A => ; compartment*Function_for_removal_of_antibody_from_the_system(mu_40, A, delta_1, T);  // modifiers: T; hasInstance ncit:C64914

  // Unit definitions:
  unit volume = 1e-3 litre;
  unit substance = 1e-3 mole;
end
