// SBML level 2 version 4
// dcterms:bibliographicCitation: The dynamics of an optimally controlled tumor model: A case study urn:miriam:doi:10.1016/S0895-7177(03)00133-X

function Function_for_presence_of_normal_cell(r2, N, b2)
  r2*N*(1 - b2*N);
end

function Function_for_Tumor_cells_removed_by_immune_system(c2, I, T, c3, N, a2, u)
  c2*I*T + c3*T*N + a2*(1 - exp(-u))*T;
end

function Function_for_initiation_of_immune_response_against_cancer(s, p, I, T, alpha)
  s + p*I*T/(alpha + T);
end

function Function_for_normal_cells_attacked_and_removed(c4, T, N, a3, u)
  c4*T*N + a3*(1 - exp(-u))*N;
end

function Function_for_induction_of_tumor_cell(r1, T, b1)
  r1*T*(1 - b1*T);
end

function Function_for_increase_in_the_chemotherapeutic_drug_at_tumor_site(v)
  v;
end

function Function_for_decrease_in_chemotherapeutic_drug_at_tumor_site(d2, u)
  d2*u;
end

function Function_for_removal_of_immune_response_components(c1, I, T, d1, a1, u)
  c1*I*T + d1*I + a1*(1 - exp(-u))*I;
end

model ddePillis2003___The_dynamics_of_an_optimally_controlled_tumor_model__A_case_study()
  // dePillis2003 - The dynamics of an optimally controlled tumor model: A case study
  // The dynamics of an optimally controlled tumor model: A case study
  // L.GDe Pillisab
  // ARadunskayaa
  // https://doi.org/10.1016/S0895-7177(03)00133-X
  // Abstract
  // We present a phase-space analysis of a mathematical model of tumor growth with an immune response and chemotherapy. We prove that all orbits are bounded and must converge to one of several possible equilibrium points. Therefore, the long-term behavior of an orbit is classified according to the basin of attraction in which it starts. The addition of a drug term to the system can move the solution trajectory into a desirable basin of attraction. We show that the solutions of the model with a time-varying drug term approach the solutions of the system without the drug once traatment has stopped. We present numerical experiments in which optimal control therapy is able to drive the system into a desirable basin of attraction, whereas traditional pulsed chemotherapy is not.
  // hasInstance mamo:MAMO_0000046 taxonomy:9606 ncit:C48686
  // isDescribedBy ncit:C48686 doi:10.1016/S0895-7177(03)00133-X
  // isDerivedFrom doi:10.1007/bf02460644
  // hasTaxon taxonomy:9606
  // hasProperty mamo:MAMO_0000046
  // biomodels.db:MODEL2001080003 biomodels.db:BIOMD0000000909

  // Compartments:
  compartment compartment = 1;

  // Species:
  species N in compartment = 1;
  species T in compartment = 0.25;  // hasInstance ncit:C12922
  species I in compartment = 0.15;  // hasInstance ncit:C12735
  species u in compartment = 0;  // hasInstance ncit:C2252

  // Parameters:
  a1 = 0.2;
  a2 = 0.3;
  a3 = 0.1;
  b1 = 1;
  b2 = 1;
  alpha = 0.3;
  c1 = 1;
  c2 = 0.5;
  c3 = 1;
  c4 = 1;
  d1 = 0.2;
  d2 = 1;
  r1 = 1.5;
  r2 = 1;
  s = 0.33;
  p = 0.01;
  v = 0;

  // Reactions:
  Presence_of_Normal_Cell: => N; compartment*Function_for_presence_of_normal_cell(r2, N, b2);  // hasInstance ncit:C12508
  Normal_cells_attacked_and_removed: N => ; compartment*Function_for_normal_cells_attacked_and_removed(c4, T, N, a3, u);  // modifiers: T, u; hasInstance ncit:C12508
  Induction_of_tumor_cell: => T; compartment*Function_for_induction_of_tumor_cell(r1, T, b1);  // hasInstance GO:0002355
  Tumor_cells_removed_by_immune_system: T => ; compartment*Function_for_Tumor_cells_removed_by_immune_system(c2, I, T, c3, N, a2, u);  // modifiers: I, N, u; hasInstance GO:0002347
  Initiation_immune_response_against_tumor: => I; compartment*Function_for_initiation_of_immune_response_against_cancer(s, p, I, T, alpha);  // modifiers: T; isVersionOf GO:0031294
  Removal_of_immune_response_components: I => ; compartment*Function_for_removal_of_immune_response_components(c1, I, T, d1, a1, u);  // modifiers: T, u; hasInstance GO:0002347
  Increase_in_amount_of_drug_at_tumor_site: => u; compartment*Function_for_increase_in_the_chemotherapeutic_drug_at_tumor_site(v);  // hasInstance GO:0008144
  Decrease_of_chemotherapeutic_drug_at_tumor_site: u => ; compartment*Function_for_decrease_in_chemotherapeutic_drug_at_tumor_site(d2, u);  // hasInstance GO:0008144

  // Unit definitions:
  unit volume = 1e-3 litre;
  unit substance = 1e-3 mole;
end
