// SBML level 3 version 1
// dcterms:bibliographicCitation: urn:miriam:pubmed:30172689

function M_source_0(sm)
  sm;
end

function M_growth_0(rm, M, km)
  rm*(1 - M/km)*M;
end

function M_decay_0(M, dm)
  M*dm;
end

function M_breakup_0(M, anm, N, bnm, acm, Tc, bcm, acnm, amm, bmm, arm, Tr, brm, dm)
  M*(anm*N/(bnm + N) + acm*Tc/(bcm + Tc) + acnm*N*Tc/((bnm + N)*(bcm + Tc)))*(1 - amm*M/(bmm + M) - arm*Tr/(brm + Tr))*dm;
end

function Tc_growth_0(rc, Tc, kc)
  rc*(1 - Tc/kc)*Tc;
end

function Tc_stimulation_0(rc, Tc, kc, amc, M, bmc, anc, N, bnc)
  rc*(1 - Tc/kc)*(amc*M/(bmc + M) + anc*N/(bnc + N))*Tc;
end

function Tc_death_0(dc, Tc)
  dc*Tc;
end

function N_source_0(sn)
  sn;
end

function N_growth_0(rn, N, kn)
  rn*(1 - N/kn)*N;
end

function N_stimulation_0(rn, N, kn, acn, Tc, bcn)
  rn*(1 - N/kn)*acn*Tc/(bcn + Tc)*N;
end

function N_death_0(dn, N)
  dn*N;
end

function Tr_growth_0(rr, Tr, kr)
  rr*(1 - Tr/kr)*Tr;
end

function Tr_stimulation_0(rr, Tr, kr, amr, M, bmr)
  rr*(1 - Tr/kr)*amr*M/(bmr + M)*Tr;
end

function Tr_death_0(dr, Tr)
  dr*Tr;
end

model Gallaher2018___Tumor_Immune_dynamics_in_multiple_myeloma()
  // Gallaher2018 - Tumor–Immune dynamics in multiple myeloma
  // The paper describes a model on the key components for tumor–immune dynamics in multiple myeloma.
  // Created by COPASI 4.25 (Build 207)
  // This model is described in the article:
  // Methods for determining key components in a mathematical model for tumor–immune dynamics in multiple myeloma
  // Jill Gallaher, Kamila Larripa, Marissa Renardy, Blerta Shtylla, Nessy Tania, Diana White, Karen Wood, Li Zhu, Chaitali Passey, Michael Robbins, Natalie Bezman, Suresh Shelat, Hearn Jay Choo, Helen Moore
  // Journal of Theoretical Biology 458 (2018) 31–46
  // Abstract:
  // In this work, we analyze a mathematical model we introduced previously for the dynamics of multiple myeloma and the immune system. We focus on four main aspects: (1) obtaining and justifying ranges and values for all parameters in the model; (2) determining a subset of parameters to which the model is most sensitive; (3) determining which parameters in this subset can be uniquely estimated given cer- tain types of data; and (4) exploring the model numerically. Using global sensitivity analysis techniques, we found that the model is most sensitive to certain growth, loss, and efficacy parameters. This anal- ysis provides the foundation for a future application of the model: prediction of optimal combination regimens in patients with multiple myeloma.
  // This model is hosted on BioModels Database and identified by: MODEL1907050001
  // To cite BioModels Database, please use: BioModels Database: An enhanced, curated and annotated resource for published quantitative kinetic models .
  // To the extent possible under law, all copyright and related or neighbouring rights to this encoded model have been dedicated to the public domain worldwide.
  // Please refer to CC0 Public Domain Dedication for more information.
  // biomodels.db:MODEL1907050001 biomodels.db:BIOMD0000000743
  // isVersionOf GO:0002418
  // hasProperty efo:0001378
  // hasProperty mamo:MAMO_0000046
  // hasTaxon taxonomy:9606
  // isDescribedBy pubmed:30172689 doi:10.1016/j.jtbi.2018.08.037
  // model units - substance: substance, time: time, volume: volume, area: area, length: length, extent: substance

  // Compartments:
  compartment compartment = 1 volume;  // ncit:C94498

  // Species:
  // M protein, 0.5-10g/dl init.
  species M in compartment = 4;  // ncit:C17788
  // CTL, 461+-416cells/ul init.
  species Tc in compartment = 464;  // ncit:C39687; CL:0000794
  // NK, 227+-141cells/ul init
  species N in compartment = 227;  // ncit:C12536; CL:0000824
  // Treg, 42+-26cells/ul
  species Tr in compartment = 42;  // CL:0000815; ncit:C78829

  // Parameters:
  // 0.001 g/dl day
  // constant source for M
  sm = 0.001 unit_0;
  // 0.004-0.5/d
  // M growth rate const.
  rm = 0.0175 unit_0;
  // 7-15g/dl
  // carrying capacity for M
  km = 10 unit_1;
  // 0.001-0.1/d
  // M natural loss rate const.
  dm = 0.002 unit_0;
  // 0-20
  // maximum fold increase in loss rate of M by N
  anm = 5 unit_1;  // isVersionOf ncit:C60693
  // 0-650cells/ul
  // threshold for increase in loss rate of M by N
  bnm = 150 unit_1;  // isVersionOf ncit:C48228
  // 0-20
  // maximum fold increase in loss rate of M by Tc
  acm = 5 unit_1;  // isVersionOf ncit:C60693
  // 0-1500cells/ul
  // threshold for increase in loss rate of M by Tc
  bcm = 375 unit_1;  // isVersionOf ncit:C48228
  // 0-20
  // maximum fold increase in N efficacy from Tc
  acnm = 8 unit_1;  // isVersionOf ncit:C60693
  // 0-1, amm+arm smaller than 1
  // maximum extent M decreases Tc and N efficacy
  amm = 0.5 unit_1;  // isVersionOf ncit:C60693
  // 0-15g/dl
  // threshold for M decreasing Tc and N efficacy
  bmm = 3 unit_1;  // isVersionOf ncit:C48228
  // 0-1, amm+arm smaller than 1
  // maximum extent Tr decreases Tc and N efficacy
  arm = 0.5 unit_1;  // isVersionOf ncit:C60693
  // 0-120cells/ul
  // threshold for Tr decreasing Tc and N efficacy
  brm = 25 unit_1;  // isVersionOf ncit:C48228
  // 0.01-0.5/d
  // Tc growth rate const.
  rc = 0.013 unit_0;
  // 600-1500cells/ul
  // carrying capacity for Tc
  kc = 800 unit_1;
  // 0.01-0.5/d
  // Tc natural loss rate const.
  dc = 0.02 unit_0;
  // 0-10
  // maximum fold increase in activation rate of Tc by M
  amc = 5 unit_1;  // isVersionOf ncit:C60693
  // 0-15g/dl
  // threshold for increase in activation rate of Tc by M
  bmc = 3 unit_1;  // isVersionOf ncit:C48228
  // 0-10
  // maximum fold increase in activation rate of Tc by N
  anc = 1 unit_1;  // isVersionOf ncit:C60693
  // 0-650cells/ul
  // threshold for increase in activation rate of Tc by N
  bnc = 150 unit_1;  // isVersionOf ncit:C48228
  // 0.001-5cells/ul d
  // constant source rate for N
  sn = 0.03 unit_0;
  // 0.01-0.5/d
  // N growth rate const.
  rn = 0.04 unit_0;
  // 300-650cells/ul
  // carrying capacity for N
  kn = 450 unit_1;
  // 0.01-0.5/d
  // N natural loss rate const.
  dn = 0.025 unit_0;
  // 0-10
  // maximum fold increase in activation rate of N by Tc
  acn = 1 unit_1;  // isVersionOf ncit:C60693
  // 0-1500cells/ul
  // threshold for increase in activation rate of Tr by M
  bcn = 375 unit_1;  // isVersionOf ncit:C48228
  // 0.01-0.5cells/ul d
  // Tr growth rate const.
  rr = 0.0831 unit_0;
  // 60-120cells/ul
  // carrying capacity for Tr
  kr = 80 unit_1;
  // 0.01-0.5/d
  // Tr natural loss rate const.a
  dr = 0.0757 unit_0;
  // 0-10
  // maximum fold increase in activation rate of Tr by M
  amr = 2 unit_1;  // isVersionOf ncit:C60693
  // 0-15g/dl
  // threshold for increase in activation rate of Tr by M
  bmr = 3 unit_1;  // isVersionOf ncit:C48228

  // Reactions:
  M_breakup: M => ; compartment*M_breakup_0(M, anm, N, bnm, acm, Tc, bcm, acnm, amm, bmm, arm, Tr, brm, dm);  // modifiers: N, Tc, Tr; isVersionOf ncit:C18104
  M_decay: M => ; compartment*M_decay_0(M, dm);  // isVersionOf ncit:C18104
  M_source: => M; compartment*M_source_0(sm);  // isVersionOf ncit:C18103
  M_growth: => M; compartment*M_growth_0(rm, M, km);  // isVersionOf ncit:C18103
  Tc_growth: => Tc; compartment*Tc_growth_0(rc, Tc, kc);  // isVersionOf GO:0035742
  Tc_death: Tc => ; compartment*Tc_death_0(dc, Tc);  // isVersionOf GO:0008219
  Tc_stimulation: => Tc; compartment*Tc_stimulation_0(rc, Tc, kc, amc, N, bmc, anc, M, bnc);  // modifiers: N, M; isVersionOf GO:0035742
  N_source: => N; compartment*N_source_0(sn);  // isVersionOf GO:0002324
  N_growth: => N; compartment*N_growth_0(rn, N, kn);  // isVersionOf GO:0002324
  N_stimulation: => N; compartment*N_stimulation_0(rn, N, kn, acn, Tc, bcn);  // modifiers: Tc; isVersionOf GO:0002324
  N_death: N => ; compartment*N_death_0(dn, N);  // isVersionOf GO:0008219
  Tr_death: Tr => ; compartment*Tr_death_0(dr, Tr);  // isVersionOf GO:0008219
  Tr_growth: => Tr; compartment*Tr_growth_0(rr, Tr, kr);  // isVersionOf GO:0002311
  Tr_stimulation: => Tr; compartment*Tr_stimulation_0(rr, Tr, kr, amr, M, bmr);  // modifiers: M; isVersionOf GO:0002311

  // Unit definitions:
  unit length = metre;
  unit area = metre^2;
  unit volume = 1e-3 litre;
  unit time = 86400 second;
  unit substance = 1e-3 mole;
  unit unit_0 = 1 / (8640 second); unit_0 is "1/d";
  unit unit_1 = dimensionless^0;
end
